!        print('//', file=fp)
!        print('cd', dsspath, file=fp)
!        print('redirect', c[0] + '.dss', file=fp)
!        print('set maxiterations=20', file=fp)
!        print('solve', file=fp)
!        print('cd', outpath, file=fp)
!        print('export summary', c[1] + '.csv', file=fp)
!        print('export cdpsmcombined', 'file=' + c[1] + '.xml', 'geo=' + region, 'subgeo=' + subregion, file=fp)
compile IEEE123Master_fixedVR.dss
solve
!redirect capacitor.dss
redirect IEEE123CommLoads.dss       // 3-phase and 1-phase delta loads, always use this
// use one but not both of the following
//redirect IEEE123PrimaryLoads.dss    // 1-phase wye loads on the primary
redirect IEEE123SecondaryLoads.dss  // 1-phase wye loads converted to secondary service

redirect pvsystems_high_pvs.dss

set maxiterations=20
solve


export summary ieee123_pv_reg_house_CIM100.csv

!export CIM100 cdpsmcombined file=ieee123_pv_reg_CIM100.xml sid=61683F36-350B-FAE0-9A22-752190519A0A fid=EBDB5A4A-543C-9025-243E-8CAD24307380 sgrid=3193578C-6CEF-F7EE-D78D-38D80D450636 geo=ieee rgnid=C9801073-17EA-61E4-F0F7-AC27F1499838
export CIM100 cdpsmcombined file=ieee123_pv_reg_house_CIM100.xml fid=E407CBB6-8C8D-9BC9-589C-AB83FBF0826D sub=ieee123_Substation sid=1BC1F4C0-4060-8913-B36B-A473AEE5D38B subgeo=medium sgrid=B6CEC5E5-D2FB-0AC0-803C-0A6FB3D0C864 geo=ieee rgnid=73C512BD-7249-4F50-50DA-D93849B89C43
